y_a(x) := ln(x^2)
y_b(x) := x*atan(x)
# [plot: y_a(x), y_b(x) vs x]
a := 1
b := 11
z := a, a + 3 .. b
h := 2
n := (b - a)/h
k := 0 .. n - 1
t[0] := a
t[k + 1] := t[k] + h
# [plot: y_a(x), y_a(z), y_a(t) vs x, z, t]
d/dx(y_a(x)) → 2/x
d/dx(y_b(x)) → atan(x) + x/(x^2 + 1)
integral(y_a(x), x) → x*(ln(x^2) - 2)
integral(y_b(x), x) → ((x^2 + 1)*atan(x) - x)/2
clear(z)
Y_a(x, z) := y_a(x) + y_b(z)
Y_a(x, z) → ln(x^2) + z*atan(z)
# [3D plot: Y_a]
# [contour plot: Y_a]
