n := 22
k := 1
A := [
    10 + n, n/5, -2, n/6, 2;
    2*n, 20 + n, 3, 1, 3;
    3, n/4, 25, k/4, 0;
    -1, n, k, k/n, 2;
    2, k*n, 3, -5, 30
] = [
    32, 4.4, -2, 3.66667, 2;
    44, 42, 3, 1, 3;
    3, 5.5, 25, 0.25, 0;
    -1, 22, 1, 0.0454545, 2;
    2, 22, 3, -5, 30
]
B := [-10 + n/2; 15; -20; n/2; k + 5] = [1; 15; -20; 11; 6]
D := augment(A, B)
det(A) = 2396903
rank(A) = 5
rank(D) = 5
solve block
    # guess values
    x0 := [0; 0; 0; 0; 0]
    # constraints
    A*x0 == B
    # solver
    X_OB := find(x0) = [-0.113582; 0.542396; -0.907278; 0.158109; -0.0731059]
end solve block
x_current := X_OB
ΔX1 := |A*x_current - B| = 4.44089e-16
ΔX := A*x_current - B = [4.44089e-16; 0; 0; 0; 0]
X_ls := lsolve(A, B)
x_current := X_ls
ΔX1 := |A*x_current - B| = 4.1243e-15
ΔX := A*x_current - B = [-1.11022e-15; 0; 0; 3.55271e-15; 1.77636e-15]
X_m := A^-1*B = [-0.113582; 0.542396; -0.907278; 0.158109; -0.0731059]
x_current := X_m
ΔX1 := |A*x_current - B| = 6.18943e-15
ΔX := A*x_current - B = [-6.66134e-16; 0; 3.55271e-15; 3.55271e-15; 3.55271e-15]
i := 0 .. rows(A) - 1
j := 0 .. cols(A) - 1
a := 0
K[i, j] := if(j == a, B[i], A[i, j])
Xk[a] := det(K)/det(A) = -0.113582
a := 1
K[i, j] := if(j == a, B[i], A[i, j])
Xk[a] := det(K)/det(A) = 0.542396
a := 2
K[i, j] := if(j == a, B[i], A[i, j])
Xk[a] := det(K)/det(A) = -0.907278
a := 3
K[i, j] := if(j == a, B[i], A[i, j])
Xk[a] := det(K)/det(A) = 0.158109
a := 4
K[i, j] := if(j == a, B[i], A[i, j])
Xk[a] := det(K)/det(A) = -0.0731059
x_current := Xk
ΔX1 := |A*x_current - B| = 9.69143e-15
ΔX := A*x_current - B = [1.55431e-15; 7.10543e-15; 0; 5.32907e-15; 3.55271e-15]
Xk = [-0.113582; 0.542396; -0.907278; 0.158109; -0.0731059]
X_G := rref(D)[:, rank(D)] = [-0.113582; 0.542396; -0.907278; 0.158109; -0.0731059]
x_current := X_G
ΔX1 := |A*x_current - B| = 6.54184e-15
ΔX := A*x_current - B = [1.33227e-15; 3.55271e-15; 3.55271e-15; 3.55271e-15; 1.77636e-15]
H[i, j] := if(i == j, 0, -A[i, j]/A[i, i]) = [
    0, -0.1375, 0.0625, -0.114583, -0.0625;
    -1.04762, 0, -0.0714286, -0.0238095, -0.0714286;
    -0.12, -0.22, 0, -0.01, 0;
    22, -484, -22, 0, -44;
    -0.0666667, -0.733333, -0.1, 0.166667, 0
]
g[i] := B[i]/A[i, i] = [0.03125; 0.357143; -0.8; 242; 0.2]
norm1(H) = 485.091
normi(H) = 572
norme(H) = 486.993
X[:, 0] := g
N := 100
k := 0 .. N - 1
X[:, k + 1] := H*X[:, k] + g
X = [
    0.03125, 0, 0, 0, 0, 0, 0, 0, 0, 0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;
    0, 0, 0, 0, 0, 0, 0, 0, 0, 0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;
    -0.8, 0, 0, 0, 0, 0, 0, 0, 0, 0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;
    242, 0, 0, 0, 0, 0, 0, 0, 0, 0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;
    0.2, 0, 0, 0, 0, 0, 0, 0, 0, 0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]
x_current := X[:, N]
ΔX1 := |A*x_current - B| = 6.00201e62
ΔX := A*x_current - B = [3.46686e62; 2.04945e62; 3.87202e61; 1.72207e61; -4.43004e62]
