k := 1
ns := 22
x0 := 0
xn := 1.4
h := 0.2
n := (xn - x0)/h
i := 0 .. n
x[i] := h*i
y[0] := ns/(3*k)
y[1] := ns/2 + 0.4
y[2] := ns/10 + 0.5
y[3] := 0.45
y[4] := 2 - ns/3
y[5] := -ns/5
y[6] := k - 3.4
y[7] := sqrt(ns*k)
j := 0 .. n - 1
x = [0; 0.2; 0.4; 0.6; 0.8; 1; 1.2; 1.4]
y = [7.33333; 11.4; 2.7; 0.45; -5.33333; -4.4; -2.4; 4.69042]
xp[j] := h/2 + h*j
xp = [0.1; 0.3; 0.5; 0.7; 0.9; 1.1; 1.3]
# [plot: y vs x]
ylin(z) := linterp(x, y, z)
vectorize(ylin(x) - y) = [0; 0; 0; 0; 0; 0; 0; -8.88178e-16]
vectorize(ylin(xp)) = [9.36667; 7.05; 1.575; -2.44167; -4.86667; -3.4; 1.14521]
# [plot: y, ylin(z) vs x, z]
yL(z) := sum(y[i]*product(if(i == j, 1, (z - x[j])/(x[i] - x[j])), j = 0 .. n), i = 0 .. n)
yL(x[1]) = 11.4
y[1] = 11.4
yL(x[1] + h/2) = 4.94899
vectorize(yL(x) - y) = [0; 0; 0; 0; 0; 0; 0; 0]
vectorize(yL(xp)) = [18.7837; 4.94899; 2.06499; -2.53159; -6.08695; -2.18937; -4.45828]
# [plot: y, yL(z) vs x, z]
yy := y
yy[n + 1] := y[n]
n := length(y) = 8
a := transpose(y)
k := 1 .. n - 1
d := 0 .. n - 1
a[k, d] := if(d ≥ (n - k), 0, a[k - 1, d + 1] - a[k - 1, d])
a = [
    7.33333, 11.4, 2.7, 0.45, -5.33333, -4.4, -2.4, 4.69042;
    4.06667, -8.7, -2.25, -5.78333, 0.933333, 2, 7.09042, 0;
    -12.7667, 6.45, -3.53333, 6.71667, 1.06667, 5.09042, 0, 0;
    19.2167, -9.98333, 10.25, -5.65, 4.02375, 0, 0, 0;
    -29.2, 20.2333, -15.9, 9.67375, 0, 0, 0, 0;
    49.4333, -36.1333, 25.5737, 0, 0, 0, 0, 0;
    -85.5667, 61.7071, 0, 0, 0, 0, 0, 0;
    147.274, 0, 0, 0, 0, 0, 0, 0
]
a := a[:, 0] = [7.33333; 4.06667; -12.7667; 19.2167; -29.2; 49.4333; -85.5667; 147.274]
yN(z) := a[0] + sum(a[i]/(i!*h^i)*product(z - x[k], k = 0 .. i - 1), i = 1 .. n - 1)
vectorize(yN(x) - y) = [0; 0; 1.77636e-15; 7.27196e-15; 1.77636e-15; -2.93099e-14; -1.15019e-13; -7.28306e-14]
vectorize(yN(xp)) = [18.7837; 4.94899; 2.06499; -2.53159; -6.08695; -2.18937; -4.45828]
# [plot: y, yN(z) vs x, z]
yls(z) := interp(lspline(x, y), x, y, z)
vectorize(yls(x) - y) = [0; 0; 0; 0; 0; 0; 0; -8.88178e-16]
vectorize(yls(xp)) = [10.8617; 7.35238; 1.23918; -2.49452; -5.51318; -3.67984; 0.602187]
yps(z) := interp(pspline(x, y), x, y, z)
vectorize(yps(x) - y) = [0; 0; 0; 0; 0; 0; 0; -8.88178e-16]
vectorize(yps(xp)) = [11.7246; 7.12156; 1.29953; -2.5051; -5.53122; -3.59711; 0.289312]
ycs(z) := interp(cspline(x, y), x, y, z)
vectorize(ycs(x) - y) = [0; 0; 0; 0; 0; 0; 0; -8.88178e-16]
vectorize(ycs(xp)) = [12.7652; 6.84312; 1.37271; -2.51938; -5.54729; -3.51856; -0.00883537]
# [plot: y, yls(z), yps(z), ycs(z) vs x, z]
