k := 1
ns := 22
x[0] := 1
x[1] := 2
x[2] := 3
x[3] := 4
x[4] := 5
x[5] := 6
x[6] := 7
y[0] := k + 0.1*ns
y[1] := ns/k
y[2] := ns - k
y[3] := ns + k
y[4] := ns*cos(k)
y[5] := k*ln(ns)
y[6] := k*ns
n := length(x) = 7
x = [1; 2; 3; 4; 5; 6; 7]
y = [3.2; 22; 21; 23; 11.8867; 3.09104; 22]
# [plot: y vs x]
K := 2
i := 0 .. K
j := 0 .. K
k[i, j] := sum(x[d]^(i + j), d = 0 .. n - 1)
yd[i] := sum(x[d]^i*y[d], d = 0 .. n - 1)
ak := k^-1*yd
k = [7, 28, 140; 28, 140, 784; 140, 784, 4676]
yd = [106.178; 434.18; 2134.64]
ak = [4.57843; 6.49626; -0.769761]
fmnk(z) := sum(ak[i]*z^i, i = 0 .. K)
Emnk := sum((fmnk(x[d]) - y[d])^2, d = 0 .. n - 1) = 435.583
# [plot: y, fmnk(z) vs x, z]
K := 6
i := 0 .. K
j := 0 .. K
k[i, j] := sum(x[d]^(i + j), d = 0 .. n - 1)
yd[i] := sum(x[d]^i*y[d], d = 0 .. n - 1)
ak := k^-1*yd
fmnk(z) := sum(ak[i]*z^i, i = 0 .. K)
Emnk := sum((fmnk(x[d]) - y[d])^2, d = 0 .. n - 1) = 3.32779e-12
# [plot: y, fmnk(z) vs x, z]
ae := [exp(intercept(x, vectorize(ln(y)))); slope(x, vectorize(ln(y)))] = [9.61006; 0.0460536]
fexp(z) := ae[0]*e^(ae[1]*z)
Eexp := sum((fexp(x[d]) - y[d])^2, d = 0 .. n - 1) = 576.894
al := [intercept(x, y); slope(x, y)] = [13.8156; 0.338169]
flin(z) := al[0] + al[1]*z
Elin := sum((flin(x[d]) - y[d])^2, d = 0 .. n - 1) = 485.356
ap := [exp(intercept(vectorize(ln(x)), vectorize(ln(y)))); slope(vectorize(ln(x)), vectorize(ln(y)))] = [7.51537; 0.353134]
fp(z) := ap[0]*e^ap[1]
Ep := sum((fp(x[d]) - y[d])^2, d = 0 .. n - 1) = 628.421
# [plot: y, fexp(z), flin(z), fp(z) vs x, z]
K := 2
i := 0 .. K
X[:, i] := vectorize(x^i)
ap := (transpose(X)*X)^-1*(transpose(X)*y)
ap = [4.57843; 6.49626; -0.769761]
fpol(z) := sum(ap[i]*z^i, i = 0 .. K)
Epol := sum((fpol(x[d]) - y[d])^2, d = 0 .. n - 1) = 435.583
# [plot: y, fpol(z) vs x, z]
K := 6
i := 0 .. K
X[:, i] := vectorize(x^i)
ap := (transpose(X)*X)^-1*(transpose(X)*y)
fpol(z) := sum(ap[i]*z^i, i = 0 .. K)
Epol := sum((fpol(x[d]) - y[d])^2, d = 0 .. n - 1) = 3.32779e-12
# [plot: y, fpol(z) vs x, z]
h := x[1] - x[0] = 1
L := h*n/2 = 3.5
K := trunc(n/2) = 3
k := 0 .. K
a[k] := h/L*sum(y[d]*cos(k*π/L*x[d]), d = 0 .. n - 1)
b[k] := h/L*sum(y[d]*sin(k*π/L*x[d]), d = 0 .. n - 1)
a = [30.3365; -6.07449; 5.00081; 7.90544]
b = [0; 2.59349; -0.776608; -2.80272]
f(z, m) := a[0]/2 + sum(a[k]*cos(k*π/L*z) + b[k]*sin(k*π/L*z), k = 1 .. m)
Ef1 := sum((f(x[d], 2) - y[d])^2, d = 0 .. n - 1) = 246.229
Ef2 := sum((f(x[d], K) - y[d])^2, d = 0 .. n - 1) = 2.2877e-29
# [plot: y, f(z, 2), f(z, K) vs x, z]
