f(x) := sin((x - 5)^2) + 2
a := 2
b := 8
n := 10
# [plot: f(x) vs x]
Sb := integral(f(x), x = a .. b) = 13.5471
ΔS(q) := |Sb - q|
δS(q) := ΔS(q)/Sb*100
h := (b - a)/n = 0.6
i := 0 .. n
z[i] := a + i*h
Spp := h*sum(f(z[i]), i = 1 .. n) = 13.1423
ΔS(Spp) = 0.404843
δS(Spp) = 2.98841
# [plot: f(z), f(z[i]) vs z, z[i] - h/2]
Slp := h*sum(f(z[i]), i = 0 .. n - 1) = 13.1423
ΔS(Slp) = 0.404843
δS(Slp) = 2.98841
k := 0 .. n - 1
# [plot: f(z), f(z[k]) vs z, z[k] + h/2]
Ssp := h*sum(f(z[i - 1] + h/2), i = 1 .. n) = 13.7793
ΔS(Ssp) = 0.232168
δS(Ssp) = 1.71378
# [plot: f(z), f(z[i]) vs z, z[i + 1] - h]
St := h*((f(z[0]) + f(z[n]))/2 + sum(f(z[i]), i = 1 .. n - 1)) = 13.1423
ΔS(St) = 0.404843
δS(St) = 2.98841
Ss := h/3*(f(z[0]) + f(z[n]) + 4*sum(f(z[2*i - 1]), i = 1 .. n/2) + 2*sum(f(z[2*(i - 1)]), i = 2 .. n/2)) = 13.155
ΔS(Ss) = 0.392151
δS(Ss) = 2.89472
N := 2000
i := 1 .. N
z[i] := a + (b - a)*rnd(1)
Smc := (b - a)/N*sum(f(z[i]), i = 1 .. N) = 13.5393
ΔS(Smc) = 0.00779922
δS(Smc) = 0.057571
