N := 22
f(x, y) := 2^x + y
a := 0
b := 1
x[0] := 0
y[0] := N/2 = 11
n := 10
h := (b - a)/n = 0.1
# метод Ейлера
i := 1 .. n
[x[i]; y[i]] := [x[i - 1] + h; y[i - 1] + h*f(x[i - 1], y[i - 1])]
yE := y
# [plot: yE vs x]
# метод Рунге-Кутта
k1(x, y) := h*f(x, y)
k2(x, y) := h*f(x + h/2, y + k1(x, y)/2)
k3(x, y) := h*f(x + h/2, y + k2(x, y)/2)
k4(x, y) := h*f(x + h, y + k3(x, y))
K(x, y) := k1(x, y) + 2*k2(x, y) + 2*k3(x, y) + k4(x, y)
[x[i]; y[i]] := [x[i - 1] + h; y[i - 1] + K(x[i - 1], y[i - 1])/6]
yRk := y
# [plot: yE, yRk vs x]
fpoch := y[0] = 11
D(x, f) := 2^x + f[0]
yRkf := rkfixed(fpoch, a, b, n, D)[:, 1]
yRka := Rkadapt(fpoch, a, b, n, D)[:, 1]
yB := Bulstoer(fpoch, a, b, n, D)[:, 1]
yR := Radau(fpoch, a, b, n, D)[:, 1]
# [plot: yE, yRk, yRkf, yRka, yB, yR vs x]
f(x, y, yd) := 4*e^x - y
a := 0
b := 1
x[0] := 0
y[0] := N
yd[0] := -3
n := 10
h := (b - a)/n = 0.1
# метод Ейлера
i := 1 .. n
[x[i]; y[i]; yd[i]] := [x[i - 1] + h; y[i - 1] + h*yd[i - 1]; yd[i - 1] + h*f(x[i - 1], y[i - 1], yd[i - 1])]
yE := y
# [plot: yE vs x]
# метод Рунге-Кутта
k1(x, y, yd) := h*f(x, y, yd)
m1(x, y, yd) := h*yd
k2(x, y, yd) := h*f(x + h/2, y + m1(x, y, yd)/2, yd + k1(x, y, yd)/2)
m2(x, y, yd) := h*(yd + k1(x, y, yd)/2)
k3(x, y, yd) := h*f(x + h/2, y + m2(x, y, yd)/2, yd + k2(x, y, yd)/2)
m3(x, y, yd) := h*(yd + k2(x, y, yd)/2)
k4(x, y, yd) := h*f(x + h, y + m3(x, y, yd), yd + k3(x, y, yd))
m4(x, y, yd) := h*(yd + k3(x, y, yd))
K(x, y, yd) := k1(x, y, yd) + 2*k2(x, y, yd) + 2*k3(x, y, yd) + k4(x, y, yd)
M(x, y, yd) := m1(x, y, yd) + 2*m2(x, y, yd) + 2*m3(x, y, yd) + m4(x, y, yd)
[x[i]; y[i]; yd[i]] := [
    x[i - 1] + h;
    y[i - 1] + M(x[i - 1], y[i - 1], yd[i - 1])/6;
    yd[i - 1] + K(x[i - 1], y[i - 1], yd[i - 1])/6
]
yRk := y
# [plot: yE, yRk vs x]
fpoch := [y[0]; yd[0]]
D(x, f) := [f[1]; 4*e^x - f[0]]
yRkf := rkfixed(fpoch, a, b, n, D)[:, 1]
yRka := Rkadapt(fpoch, a, b, n, D)[:, 1]
yB := Bulstoer(fpoch, a, b, n, D)[:, 1]
yR := Radau(fpoch, a, b, n, D)[:, 1]
# [plot: yE, yRk, yRkf, yRka, yB, yR vs x]
a := 0
b := 4
x[0] := 0
y[0] := N
yd[0] := 0
n := 10
h := (b - a)/n = 0.4
f1(x, y, yd) := sin(x^2 + yd^2)
f2(x, y, yd) := cos(x*y)
fpoch := [y[0]; yd[0]]
D(x, f) := [sin(x^2 + f[1]^2); cos(x*f[0])]
yRkf := rkfixed(fpoch, a, b, n, D)[:, 1]
x := rkfixed(fpoch, a, b, n, D)[:, 0]
yRka := Rkadapt(fpoch, a, b, n, D)[:, 1]
yB := Bulstoer(fpoch, a, b, n, D)[:, 1]
yR := Radau(fpoch, a, b, n, D)[:, 1]
# [plot: yRkf, yRka, yB, yR vs x]
