R1 := 0.068
R2 := 0.028
R12 := 0.1
U1 := 110
U2 := 65
L1 := 0
L2 := 0.12
L12 := 0.15
R := [R1, 0, R12; 0, R2, R12; 1, 1, -1]
U := [U1; U2; 0]
D := augment(R, U)
I := rref(D)[:, rank(D)] = [658.901; -6.9541; 651.947]
I1b := I[0] = 658.901
I2b := I[1] = -6.9541
I12b := I[2] = 651.947
I0 := [0; 0]
ΔI := R*I - U = [-1.42109e-14; -2.84217e-14; -1.13687e-13]
ΔI1 := |R*I - U| = 1.18044e-13
D(t, I) := [(U1 - I[0]*(R1 + R12) + I[1]*R1)/L12; (U2 - U1 - I[1]*(R1 + R2) + I[0]*R1)/L2]
S := Radau(I0, 0, 0.3, 50, D)
t0 := 0
t1 := 0.3
N := 50
t := S[:, 0]
I12 := S[:, 1]
I2 := S[:, 2]
I1 := I12 - I2
# [plot: t vs I1, I2, I12]
vs := pspline(t, I2)
z := 0.03
I2_spline(z) := interp(vs, t, I2, z)
dI2(z) := d/dz(I2_spline(z))
z_extr := root(dI2(z), z)
I2_max := I2_spline(z_extr)
m := 3
vs_reg := regress(t, I2, m)
I2_approx(z) := interp(vs_reg, t, I2, z)
h := (t1 - t0)/N = 0.006
i_int := 1 .. (N - 1)
S_trap := h*((I2_approx(t0) + I2_approx(t1))/2 + sum(I2_approx(t[k]), k = 1 .. N - 1)) = -14.0049
d2I2_approx(z) := d^2/dz^2(I2_approx(z))
M2 := max(vectorize(d2I2_approx(t))) = 701.576
R_trap := M2*(t1 - t0)*h^2/12 = 0.000631419
w := 10*π
U1_t(t) := U1*sin(w*t)
D_sin(t, I) := [(U1_t(t) - I[0]*(R1 + R12) + I[1]*R1)/L12; (U2 - U1_t(t) - I[1]*(R1 + R2) + I[0]*R1)/L2]
D_sin(0, I0) = [0; 541.667]
S_sin := Bulstoer(I0, t0, t1, N, D_sin)
t_sin := S_sin[:, 0]
I12_sin := S_sin[:, 1]
I2_sin := S_sin[:, 2]
I1_sin := I12_sin - I2_sin
F(z) := [sin(w*z); cos(w*z); 1]
coeff1 := linfit(t_sin, I1_sin, F)
coeff2 := linfit(t_sin, I2_sin, F)
coeff12 := linfit(t_sin, I12_sin, F)
I1_lin(z) := coeff1[0]*sin(w*z) + coeff1[1]*cos(w*z) + coeff1[2]
I2_lin(z) := coeff2[0]*sin(w*z) + coeff2[1]*cos(w*z) + coeff2[2]
I12_lin(z) := coeff12[0]*sin(w*z) + coeff12[1]*cos(w*z) + coeff12[2]
bisection(f, a, b, eps) :=
    x0 ← a
    x1 ← b
    while |x1 - x0| > eps
        xm ← (x0 + x1)/2
        if f(x0)*f(xm) < 0
            x1 ← xm
        if f(x0)*f(xm) ≥ 0
            x0 ← xm
    (x0 + x1)/2
root_t1 := bisection(I1_lin, 0, 0.1, 10^-5) = 0.0712616
I1_lin(root_t1) = 0.000891046
root_t2 := bisection(I2_lin, 0, 0.1, 10^-5) = 0.0999969
I2_lin(root_t2) = 31.6538
root_t12 := bisection(I12_lin, 0, 0.1, 10^-5) = 0.0106781
I12_lin(root_t12) = 0.000549493
A2 := [-1.12, 0.453333333333; 0.566666666667, -0.8]
b2 := [733.333333333; -375]
xss2 := -1*A2^-1*b2 = [651.947; -6.9541]
lam2 := eigenvals(A2) = [-0.428503; -1.4915]
V2 := eigenvecs(A2) = [-0.548266, -0.773466; -0.836304, 0.633838]
c2 := lsolve(V2, -1*xss2) = [410.162; 552.15]
Xex2(t) := xss2 + V2*[c2[0]*exp(lam2[0]*t); c2[1]*exp(lam2[1]*t)]
I12ex(t) := Xex2(t)[0]
I2ex(t) := Xex2(t)[1]
I1ex(t) := I12ex(t) - I2ex(t)
E12 := max(vectorize(|I12 - I12ex(t)|)) = 0.00022779
E2 := max(vectorize(|I2 - I2ex(t)|)) = 0.000184228
E1 := max(vectorize(|I1 - I1ex(t)|)) = 0.000412018
maxI12 := max(vectorize(|I12|)) = 181.19
maxI2 := max(vectorize(|I2|)) = 84.8718
maxI1 := max(vectorize(|I1|)) = 266.061
relE12 := E12/maxI12 = 1.25719e-6
relE2 := E2/maxI2 = 2.17066e-6
relE1 := E1/maxI1 = 1.54858e-6
Espl := max(vectorize(|I2 - I2_spline(t)|)) = 0
Rspl := mean(vectorize((I2 - I2_spline(t))^2))^0.5 = 0
Eapx := max(vectorize(|I2 - I2_approx(t)|)) = 0.00600917
Rapx := mean(vectorize((I2 - I2_approx(t))^2))^0.5 = 0.00238854
relEapx := Eapx/maxI2 = 7.08029e-5
Sex := integral(I2_approx(z), z = t0 .. t1) = -14.0054
dS := |S_trap - Sex| = 0.000509128
reldS := dS/|Sex| = 3.63524e-5
N2 := 100
Ssin2 := Bulstoer(I0, t0, t1, N2, D_sin) = [
    0, 0, 0;
    0.003, 0.104524, 1.49372;
    0.006, 0.416474, 2.72668;
    0.009, 0.932055, 3.7033;
    0.012, 1.64569, 4.43021;
    0.015, 2.55007, 4.91624;
    0.018, 3.63622, 5.17231;
    0.021, 4.89357, 5.21136;
    0.024, 6.31004, 5.04819;
    0.027, 7.8722, 4.69937
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]
c12s2 := Ssin2[:, 1] = [
    0; 0.104524; 0.416474; 0.932055; 1.64569; 2.55007; 3.63622; 4.89357; 6.31004; 7.8722
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]
c2s2 := Ssin2[:, 2] = [
    0; 1.49372; 2.72668; 3.7033; 4.43021; 4.91624; 5.17231; 5.21136; 5.04819; 4.69937
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]
c1s2 := c12s2 - c2s2 = [
    0; -1.3892; -2.31021; -2.77124; -2.78451; -2.36616; -1.53609; -0.317792; 1.26185; 3.17282
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]
Ebul12 := |c12s2[100] - I12_sin[50]| = 6.27374e-8
Ebul2 := |c2s2[100] - I2_sin[50]| = 8.26227e-8
Ebul1 := |c1s2[100] - I1_sin[50]| = 1.4536e-7
Er1 := max(vectorize(|I1_sin - I1_lin(t_sin)|)) = 72.4699
Er2 := max(vectorize(|I2_sin - I2_lin(t_sin)|)) = 70.5401
Er12 := max(vectorize(|I12_sin - I12_lin(t_sin)|)) = 1.9298
Rr1 := mean(vectorize((I1_sin - I1_lin(t_sin))^2))^0.5 = 44.7803
Rr2 := mean(vectorize((I2_sin - I2_lin(t_sin))^2))^0.5 = 44.74
Rr12 := mean(vectorize((I12_sin - I12_lin(t_sin))^2))^0.5 = 0.669628
bres1 := |I1_lin(root_t1)| = 0.000891046
bres2 := |I2_lin(root_t2)| = 31.6538
bres12 := |I12_lin(root_t12)| = 0.000549493
vs1 := pspline(t, I1)
I1spline(z) := interp(vs1, t, I1, z)
Espl1 := max(vectorize(|I1 - I1spline(t)|)) = 0
Rspl1 := mean(vectorize((I1 - I1spline(t))^2))^0.5 = 0
vsreg1 := regress(t, I1, m)
I1approx(z) := interp(vsreg1, t, I1, z)
Eapx1 := max(vectorize(|I1 - I1approx(t)|)) = 0.0134293
Rapx1 := mean(vectorize((I1 - I1approx(t))^2))^0.5 = 0.00533844
relEapx1 := Eapx1/maxI1 = 5.04743e-5
S_trap1 := h*((I1approx(t0) + I1approx(t1))/2 + sum(I1approx(t[k]), k = 1 .. N - 1)) = 42.9873
Sex1 := integral(I1approx(z), z = t0 .. t1) = 42.9886
dS1 := |S_trap1 - Sex1| = 0.00123016
reldS1 := dS1/|Sex1| = 2.86159e-5
vs12 := pspline(t, I12)
I12spline(z) := interp(vs12, t, I12, z)
Espl12 := max(vectorize(|I12 - I12spline(t)|)) = 0
Rspl12 := mean(vectorize((I12 - I12spline(t))^2))^0.5 = 0
vsreg12 := regress(t, I12, m)
I12approx(z) := interp(vsreg12, t, I12, z)
Eapx12 := max(vectorize(|I12 - I12approx(t)|)) = 0.00742008
Rapx12 := mean(vectorize((I12 - I12approx(t))^2))^0.5 = 0.00294991
relEapx12 := Eapx12/maxI12 = 4.0952e-5
S_trap12 := h*((I12approx(t0) + I12approx(t1))/2 + sum(I12approx(t[k]), k = 1 .. N - 1)) = 28.9825
Sex12 := integral(I12approx(z), z = t0 .. t1) = 28.9832
dS12 := |S_trap12 - Sex12| = 0.000721028
reldS12 := dS12/|Sex12| = 2.48774e-5
